Xn := [3, 5, 5, 3]
Yn := [2, 2, 4, 4]
Nodos := [1, 2, 3, 4]
N_1 := (1 - ξ)*(1 - η)/4
N_2 := (1 + ξ)*(1 - η)/4
N_3 := (1 + ξ)*(1 + η)/4
N_4 := (1 - ξ)*(1 + η)/4
x := N.1*X_1 + N.2*X_2 + N.3*X_3 + N.4*X_4
y := N.1*Y_1 + N.2*Y_2 + N.3*Y_3 + N.4*Y_4
D := E/(1 - ν^2)*[1, ν, 0; ν, 1, 0; 0, 0, (1 - ν)/2]
D := Ep/(1 - νp^2)*[1, νp, 0; νp, 1, 0; 0, 0, (1 - νp)/2]
D
I_a := [1, 0, 0, 0; 0, 0, 0, 1; 0, 1, 1, 0]
Ia := [1, 0, 0, 0; 0, 0, 0, 1; 0, 1, 1, 0]
∂N_1/∂ξ := -(1 - η)/4
∂N_2/∂ξ := (1 - η)/4
∂N_3/∂ξ := (1 + η)/4
∂N_4/∂ξ := -(1 + η)/4
∂N_1/∂η := -(1 - ξ)/4
∂N_2/∂η := -(1 + ξ)/4
∂N_3/∂η := (1 + ξ)/4
∂N_4/∂η := (1 - ξ)/4
dN1dξ(η) := -(1 - η)/4
dN2dξ(η) := (1 - η)/4
dN3dξ(η) := (1 + η)/4
dN4dξ(η) := -(1 + η)/4
dN1dη(ξ) := -(1 - ξ)/4
dN2dη(ξ) := -(1 + ξ)/4
dN3dη(ξ) := (1 + ξ)/4
dN4dη(ξ) := (1 - ξ)/4
gp := 1/sqr(3)
ξg := [-gp, gp, gp, -gp]
ηg := [-gp, gp, -gp, gp]
Wg := [1, 1, 1, 1]
J(ξ, η) := [∂x/∂ξ, ∂y/∂ξ; ∂x/∂η, ∂y/∂η]
Γ := J^-1
Γ_a := [Γ, 0; 0, Γ]
dN := [
    ∂N_1/∂ξ, 0, ∂N_2/∂ξ, 0, ∂N_3/∂ξ, 0, ∂N_4/∂ξ, 0;
    ∂N_1/∂η, 0, ∂N_2/∂η, 0, ∂N_3/∂η, 0, ∂N_4/∂η, 0;
    0, ∂N_1/∂ξ, 0, ∂N_2/∂ξ, 0, ∂N_3/∂ξ, 0, ∂N_4/∂ξ;
    0, ∂N_1/∂η, 0, ∂N_2/∂η, 0, ∂N_3/∂η, 0, ∂N_4/∂η
]
B_k := I.a*Γ.a*dN
φ_k := B^T*D*B*det(J)*t
Kele := matrix(8, 8)
ξk := ξg[k]
ηk := ηg[k]
dNdξ := [dN1dξ(ηk), dN2dξ(ηk), dN3dξ(ηk), dN4dξ(ηk)]
dNdη := [dN1dη(ξk), dN2dη(ξk), dN3dη(ξk), dN4dη(ξk)]
J11 := dNdξ[1]*Xn[1] + dNdξ[2]*Xn[2] + dNdξ[3]*Xn[3] + dNdξ[4]*Xn[4]
J12 := dNdξ[1]*Yn[1] + dNdξ[2]*Yn[2] + dNdξ[3]*Yn[3] + dNdξ[4]*Yn[4]
J21 := dNdη[1]*Xn[1] + dNdη[2]*Xn[2] + dNdη[3]*Xn[3] + dNdη[4]*Xn[4]
J22 := dNdη[1]*Yn[1] + dNdη[2]*Yn[2] + dNdη[3]*Yn[3] + dNdη[4]*Yn[4]
Jm := [J11, J12; J21, J22]
detJk := J11*J22 - J12*J21
Jinv := 1/detJk*[J22, -J12; -J21, J11]
Ga := [
    Jinv.(1, 1), Jinv.(1, 2), 0, 0;
    Jinv.(2, 1), Jinv.(2, 2), 0, 0;
    0, 0, Jinv.(1, 1), Jinv.(1, 2);
    0, 0, Jinv.(2, 1), Jinv.(2, 2)
]
dN := [
    dNdξ[1], 0, dNdξ[2], 0, dNdξ[3], 0, dNdξ[4], 0;
    dNdη[1], 0, dNdη[2], 0, dNdη[3], 0, dNdη[4], 0;
    0, dNdξ[1], 0, dNdξ[2], 0, dNdξ[3], 0, dNdξ[4];
    0, dNdη[1], 0, dNdη[2], 0, dNdη[3], 0, dNdη[4]
]
Bk := Ia*Ga*dN
phik := transp(Bk)*D*Bk*detJk*tp
indexer(Kele)(i, j) := Kele.(i, j) + Wg[k]*phik.(i, j)
Kd := matrix(8, 8)
indexer(Kd)(i, j) := round(Kele.(i, j)/10000*1000)/1000
Kd
maxdiff := 0
dij := abs(Kele.(i, j) - Kele.(j, i))
maxdiff := dij
mindiag := Kele.(1, 1)
mindiag := Kele.(i, i)
